OpenVSP model (file version 5), 4 components.
Geometry view with OpenVSP parameter names; values to 6 digits, angles in degrees, lengths in the model's unit.
Overall bounding box: X_Min=-2.21975 X_Len=6.47449 Y_Min=0 Y_Len=4 Z_Min=-0.100058 Z_Len=0.332617

Wing "WingGeom"
  location (X Y Z) 0 0 0, rotation 0 0 0
  bounding box size 2 4 0.200116
  totals: TotalSpan=4 TotalProjectedSpan=4 TotalChord=2 TotalArea=8 TotalAR=2
  root: chord 2, twist 0, NACA 4-series Camber=0 CamberLoc=0.2 ThickChord=0.1
  sections:
    n  Span  Root_Chord  Tip_Chord  Area  Sweep  Sweep_Location  Dihedral  Twist  Twist_Location  tip airfoil
    1  4     2           2          8     0      0.25            0         0      0.25            as above

Propeller "LiftRotor", child of "WingGeom"
  location (X Y Z) 3.25 2 0.2, rotation 0 90 0
  bounding box size 2.00948 2.00948 0.0651177
  Design: Diameter=2 NumBlade=4 Beta34=0 UseBeta34Flag=1 Feather=-17.0843 Rotate=0 Precone=0 ReverseFlag=0 FoldAngle=0 PropMode=0 AF=91.35 CLi=0.524046 Chord=0.12 Solidity=0.152789 ConstructXoC=0.5 FeatherAxisXoC=0.5 FeatherOffsetXoC=0
  cross sections:
    n  RadiusFrac  shape
    0  0.15        ellipse Ellipse_Height=0.06 Ellipse_Width=0.12
    1  0.400001    NACA 16-series Chord=0.12 IdealCl=0.7 ThickChord=0.20003
    2  1           airfoil file ""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 BaseThickChord=1 Chord=0.12 ThickChord=0.03
  Chord along r/R (cubic Bezier): 0.15: 0.12, 0.3: 0.12, 0.45: 0.12, 0.6: 0.12, 0.716667: 0.12, 0.833333: 0.12, 0.95: 0.12, 0.966667: 0.12, 0.983333: 0.12, 1: 0.12
  Twist along r/R (linear): 0.15: 31.1667, 0.603412: 18.7407, 1: 14.2593
  Thick along r/R (cubic Bezier): 0.15: 0.5, 0.233367: 0.3, 0.316733: 0.225, 0.4001: 0.2, 0.466733: 0.125, 0.533367: 0.115, 0.6: 0.1, 0.733333: 0.075, 0.866667: 0.055, 1: 0.03
  CLI along r/R (cubic Bezier): 0.15: 0, 0.233367: 0.7, 0.316733: 0.7, 0.4001: 0.7, 0.466733: 0.7, 0.533367: 0.7, 0.6: 0.7, 0.733333: 0.7, 0.866667: 0.7, 1: 0.2

Hinge "HingeGeom", child of "WingGeom"
  location (X Y Z) -1.25 2 0, rotation 0 0 0
  Hinge: JointRotMax=360 JointRotMaxFlag=0 JointRotMin=-360 JointRotMinFlag=0 JointRotate=0 JointRotateFlag=1 JointTransMax=1000 JointTransMaxFlag=0 JointTransMin=-1000 JointTransMinFlag=0 JointTranslate=0 JointTranslateFlag=0 OrientRotFlag=0 PrimOffAbsRelFlag=1 PrimType=0 PrimULoc=0 PrimVecAbsRelFlag=1 PrimWLoc=0 PrimXOff=0 PrimXOffRel=0 PrimXVec=0 PrimXVecRel=0 PrimYOff=0 PrimYOffRel=0 PrimYVec=1 PrimYVecRel=1 PrimZOff=0 PrimZOffRel=0 PrimZVec=0 PrimZVecRel=0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

Propeller "CruiseProp", child of "HingeGeom"
  location (X Y Z) -1.25 2 0.2, rotation 0 90 0; relative location 0 0 0.2, rotation 0 90 0
  bounding box size 1.93932 1.8461 0.0386092
  negative volume
  Design: Diameter=2 NumBlade=5 Beta34=0 UseBeta34Flag=1 Feather=-13.125 Rotate=0 Precone=0 ReverseFlag=0 FoldAngle=0 PropMode=0 AF=93.6 CLi=0.539797 Chord=0.12 Solidity=0.190986 ConstructXoC=0.5 FeatherAxisXoC=0.5 FeatherOffsetXoC=0
  cross sections:
    n  RadiusFrac  shape
    0  0.15        NACA 5-digit CamberLoc=0.15 Chord=0.12 IdealCl=0 ThickChord=0.14
    1  0.4         NACA 5-digit CamberLoc=0.15 Chord=0.12 IdealCl=0.7 ThickChord=0.112974
    2  1           NACA 5-digit CamberLoc=0.15 Chord=0.12 IdealCl=0.2 ThickChord=0.03
  Chord along r/R (cubic Bezier): 0.15: 0.12, 0.233333: 0.12, 0.316667: 0.12, 0.4: 0.12, 0.466667: 0.12, 0.533333: 0.12, 0.6: 0.12, 0.733333: 0.12, 0.866667: 0.12, 1: 0.12
  Twist along r/R (linear): 0.15: 30, 0.6: 15, 1: 10
  Thick along r/R (cubic Bezier): 0.15: 0.14, 0.433333: 0.111885, 0.716667: 0.0752187, 1: 0.03
  CLI along r/R (cubic Bezier): 0.15: 0, 0.233333: 0.7, 0.316667: 0.7, 0.4: 0.7, 0.466667: 0.7, 0.533333: 0.7, 0.6: 0.7, 0.733333: 0.7, 0.866667: 0.7, 1: 0.2

VSPAERO settings: Sref=3.45312 bref=4.5 cref=0.767361 Xcg=0 Ycg=0 Zcg=0 AlphaStart=0 AlphaEnd=10 AlphaNpts=1 BetaStart=0 BetaEnd=0 BetaNpts=1 MachStart=0 MachEnd=0 MachNpts=1 ReCref=1e+07 Vinf=60 Rho=1.125
