OpenVSP model (file version 5), 2 components.
Geometry view with OpenVSP parameter names; values to 6 digits, angles in degrees, lengths in the model's unit.
Overall bounding box: X_Min=-1.27607 X_Len=5.22939 Y_Min=1.29668 Y_Len=1.40664 Z_Min=-0.678278 Z_Len=1.35644

Propeller "LiftRotor"
  location (X Y Z) 3.25 2 0.2, rotation 0 90 0
  bounding box size 1.40664 1.40664 0.0585252
  Design: Diameter=1.4 NumBlade=4 Beta34=20 UseBeta34Flag=1 Feather=2.91572 Rotate=0 Precone=0 ReverseFlag=0 FoldAngle=0 PropMode=0 AF=91.35 CLi=0.524046 Chord=0.12 Solidity=0.152789 ConstructXoC=0.5 FeatherAxisXoC=0.5 FeatherOffsetXoC=0
  cross sections:
    n  RadiusFrac  shape
    0  0.15        ellipse Ellipse_Height=0.042 Ellipse_Width=0.084
    1  0.400001    NACA 16-series Chord=0.084 IdealCl=0.7 ThickChord=0.20003
    2  1           airfoil file ""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 BaseThickChord=1 Chord=0.084 ThickChord=0.03
  Chord along r/R (cubic Bezier): 0.15: 0.12, 0.3: 0.12, 0.45: 0.12, 0.6: 0.12, 0.716667: 0.12, 0.833333: 0.12, 0.95: 0.12, 0.966667: 0.12, 0.983333: 0.12, 1: 0.12
  Twist along r/R (linear): 0.15: 31.1667, 0.603412: 18.7407, 1: 14.2593
  Thick along r/R (cubic Bezier): 0.15: 0.5, 0.233367: 0.3, 0.316733: 0.225, 0.4001: 0.2, 0.466733: 0.125, 0.533367: 0.115, 0.6: 0.1, 0.733333: 0.075, 0.866667: 0.055, 1: 0.03
  CLI along r/R (cubic Bezier): 0.15: 0, 0.233367: 0.7, 0.316733: 0.7, 0.4001: 0.7, 0.466733: 0.7, 0.533367: 0.7, 0.6: 0.7, 0.733333: 0.7, 0.866667: 0.7, 1: 0.2

Propeller "CruiseProp"
  location (X Y Z) -1.25 2 0, rotation 0 0 0
  bounding box size 0.0512728 1.29124 1.35644
  negative volume
  Design: Diameter=1.4 NumBlade=5 Beta34=20 UseBeta34Flag=1 Feather=6.875 Rotate=0 Precone=0 ReverseFlag=0 FoldAngle=0 PropMode=0 AF=93.6 CLi=0.539797 Chord=0.12 Solidity=0.190986 ConstructXoC=0.5 FeatherAxisXoC=0.5 FeatherOffsetXoC=0
  cross sections:
    n  RadiusFrac  shape
    0  0.15        NACA 5-digit CamberLoc=0.15 Chord=0.084 IdealCl=0 ThickChord=0.14
    1  0.4         NACA 5-digit CamberLoc=0.15 Chord=0.084 IdealCl=0.7 ThickChord=0.112974
    2  1           NACA 5-digit CamberLoc=0.15 Chord=0.084 IdealCl=0.2 ThickChord=0.03
  Chord along r/R (cubic Bezier): 0.15: 0.12, 0.233333: 0.12, 0.316667: 0.12, 0.4: 0.12, 0.466667: 0.12, 0.533333: 0.12, 0.6: 0.12, 0.733333: 0.12, 0.866667: 0.12, 1: 0.12
  Twist along r/R (linear): 0.15: 30, 0.6: 15, 1: 10
  Thick along r/R (cubic Bezier): 0.15: 0.14, 0.433333: 0.111885, 0.716667: 0.0752187, 1: 0.03
  CLI along r/R (cubic Bezier): 0.15: 0, 0.233333: 0.7, 0.316667: 0.7, 0.4: 0.7, 0.466667: 0.7, 0.533333: 0.7, 0.6: 0.7, 0.733333: 0.7, 0.866667: 0.7, 1: 0.2

VSPAERO settings: Sref=3.45312 bref=4.5 cref=0.767361 Xcg=0 Ycg=0 Zcg=0 AlphaStart=0 AlphaEnd=10 AlphaNpts=1 BetaStart=0 BetaEnd=0 BetaNpts=1 MachStart=0 MachEnd=0 MachNpts=1 ReCref=1e+07 Vinf=60 Rho=1.125
