OpenVSP model (file version 5), 10 components.
Geometry view with OpenVSP parameter names; values to 6 digits, angles in degrees, lengths in the model's unit.
Overall bounding box: X_Min=0 X_Len=5.5 Y_Min=-2.30426 Y_Len=4.60852 Z_Min=-0.433816 Z_Len=1.58668

Fuselage "Fuselage"
  location (X Y Z) 0 0 0, rotation 0 0 0
  bounding box size 5.5 0.625 1.08515
  Design: Length=5.5
  cross sections:
    n  XLocPercent  YLocPercent  ZLocPercent  shape
    0  0            0            0            point
    1  0.25         0            0.0163934    rounded rectangle RoundRectXSec_Radius=0.245893 RoundedRect_Height=1.04796 RoundedRect_Width=0.625
    2  0.5          0            0.0737705    ellipse Ellipse_Height=0.397959 Ellipse_Width=0.306122
    3  0.75         0            0.07377      as above
    4  1            0            0.07377      point

Wing "WingGeom", child of "Fuselage"
  location (X Y Z) 1.51639 0 0.57377, rotation 0 0 0
  symmetric about XZ
  bounding box size 1 4.5 0.100058
  totals: TotalSpan=4.5 TotalProjectedSpan=4.5 TotalChord=0.9 TotalArea=4.05 TotalAR=5
  root: chord 1, twist 0, NACA 4-series Camber=0 CamberLoc=0.2 ThickChord=0.1
  sections:
    n  Span  Root_Chord  Tip_Chord  Area   Sweep  Sweep_Location  Dihedral  Twist  Twist_Location  tip airfoil
    1  2.25  1           0.8        2.025  0      0.25            0         0      0.25            as above

Fuselage "PropNacells", child of "WingGeom"
  location (X Y Z) 1.03644 1.603 0.37377, rotation 0 0 0; relative location -0.479958 1.603 -0.2, rotation 0 0 0
  bounding box size 2.1 0.261388 0.260438
  Design: Length=2.1
  cross sections:
    n  XLocPercent  YLocPercent  ZLocPercent  shape
    0  0            0            0.0580169    point
    1  0.25         0            0.0414894    ellipse Ellipse_Height=0.25 Ellipse_Width=0.25
    2  0.5          0            0.0418236    as above
    3  0.75         0            0.06         ellipse Ellipse_Height=0.175 Ellipse_Width=0.25
    4  1            0            0.100236     point

Propeller "LiftRotor", child of "PropNacells"
  location (X Y Z) 3.04595 1.603 0.682133, rotation 0 90 0; relative location 2.00951 0 0.308362, rotation 0 90 0
  bounding box size 1.40252 1.40252 0.0560558
  Design: Diameter=1.4 NumBlade=4 Beta34=20 UseBeta34Flag=1 Feather=3.22525 Rotate=0 Precone=0 ReverseFlag=0 FoldAngle=0 PropMode=0 AF=148.919 CLi=0.524046 Chord=0.177656 Solidity=0.226199 ConstructXoC=0.5 FeatherAxisXoC=0.5 FeatherOffsetXoC=0
  cross sections:
    n  RadiusFrac  shape
    0  0.2         ellipse Ellipse_Height=0.028 Ellipse_Width=0.056
    1  0.400001    NACA 16-series Chord=0.116375 IdealCl=0.7 ThickChord=0.200037
    2  1           NACA 16-series Chord=0.091 IdealCl=0.2 ThickChord=0.03
  Chord along r/R (cubic Bezier): 0.2: 0.08, 0.333333: 0.15, 0.466667: 0.2, 0.6: 0.2, 0.716667: 0.2, 0.833333: 0.2, 0.95: 0.2, 0.966667: 0.2, 0.983333: 0.2, 1: 0.13
  Twist along r/R (cubic Bezier): 0.2: 31.1667, 0.334471: 23.4259, 0.468941: 20.7778, 0.603412: 18.7407, 0.735608: 16.7037, 0.867804: 15.4815, 1: 14.2593
  Thick along r/R (cubic Bezier): 0.2: 0.5, 0.2667: 0.3, 0.3334: 0.225, 0.4001: 0.2, 0.466733: 0.125, 0.533367: 0.115, 0.6: 0.1, 0.733333: 0.075, 0.866667: 0.055, 1: 0.03
  CLI along r/R (cubic Bezier): 0.2: 0, 0.2667: 0.7, 0.3334: 0.7, 0.4001: 0.7, 0.466733: 0.7, 0.533367: 0.7, 0.6: 0.7, 0.733333: 0.7, 0.866667: 0.7, 1: 0.2

Hinge "HingeGeom", child of "PropNacells"
  location (X Y Z) 0.966436 1.603 0.47377, rotation 0 0 0; relative location -0.07 0 0.1, rotation 0 0 0
  Hinge: JointRotMax=360 JointRotMaxFlag=0 JointRotMin=-360 JointRotMinFlag=0 JointRotate=0 JointRotateFlag=1 JointTransMax=1000 JointTransMaxFlag=0 JointTransMin=-1000 JointTransMinFlag=0 JointTranslate=0 JointTranslateFlag=0 OrientRotFlag=0 PrimOffAbsRelFlag=1 PrimType=0 PrimULoc=0 PrimVecAbsRelFlag=1 PrimWLoc=0 PrimXOff=0 PrimXOffRel=0 PrimXVec=0 PrimXVecRel=0 PrimYOff=0 PrimYOffRel=0 PrimYVec=1 PrimYVecRel=1 PrimZOff=0 PrimZOffRel=0 PrimZVec=0 PrimZVecRel=0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

Propeller "CruiseProp", child of "HingeGeom"
  location (X Y Z) 0.766436 1.603 0.47377, rotation 0 0 0; relative location -0.2 0 0, rotation 0 0 0
  bounding box size 0.0516199 1.29358 1.3519
  negative volume
  Design: Diameter=1.4 NumBlade=5 Beta34=20 UseBeta34Flag=1 Feather=7.96875 Rotate=0 Precone=0 ReverseFlag=0 FoldAngle=0 PropMode=0 AF=103.884 CLi=0.538798 Chord=0.132407 Solidity=0.210733 ConstructXoC=0.5 FeatherAxisXoC=0.5 FeatherOffsetXoC=0
  cross sections:
    n  RadiusFrac  shape
    0  0.2         NACA 5-digit CamberLoc=0.15 Chord=0.056 IdealCl=0 ThickChord=0.14
    1  0.4         NACA 5-digit CamberLoc=0.15 Chord=0.0954074 IdealCl=0.7 ThickChord=0.11731
    2  1           NACA 5-digit CamberLoc=0.15 Chord=0.07 IdealCl=0.2 ThickChord=0.03
  Chord along r/R (cubic Bezier): 0.2: 0.08, 0.266667: 0.0933333, 0.333333: 0.12, 0.4: 0.136296, 0.466667: 0.152593, 0.533333: 0.15, 0.6: 0.15, 0.733333: 0.15, 0.866667: 0.15, 1: 0.1
  Twist along r/R (cubic Bezier): 0.2: 30, 0.333333: 23.375, 0.466667: 19.5556, 0.6: 15, 0.733333: 11.6111, 0.866667: 10.3889, 1: 10
  Sweep along r/R (cubic Bezier): 0.2: 0, 0.326772: -1.62609, 0.453543: -3, 0.580315: -3, 0.72021: -3, 0.860105: -1.63913, 1: 1
  Thick along r/R (cubic Bezier): 0.2: 0.14, 0.466667: 0.111885, 0.733333: 0.0752187, 1: 0.03
  CLI along r/R (cubic Bezier): 0.2: 0, 0.266667: 0.7, 0.333333: 0.7, 0.4: 0.7, 0.466667: 0.7, 0.533333: 0.7, 0.6: 0.7, 0.733333: 0.7, 0.866667: 0.7, 1: 0.2

Fuselage "PropNacells_2", child of "WingGeom"
  location (X Y Z) 1.03644 -1.603 0.37377, rotation 0 0 0; relative location -0.479958 -1.603 -0.2, rotation 0 0 0
  bounding box size 2.1 0.261388 0.260438
  Design: Length=2.1
  cross sections:
    n  XLocPercent  YLocPercent  ZLocPercent  shape
    0  0            0            0.0580169    point
    1  0.25         0            0.0414894    ellipse Ellipse_Height=0.25 Ellipse_Width=0.25
    2  0.5          0            0.0418236    as above
    3  0.75         0            0.06         ellipse Ellipse_Height=0.175 Ellipse_Width=0.25
    4  1            0            0.100236     point

Propeller "LiftRotor_2", child of "PropNacells_2"
  location (X Y Z) 3.04595 -1.603 0.682133, rotation 0 90 0; relative location 2.00951 0 0.308362, rotation 0 90 0
  bounding box size 1.40252 1.40252 0.0560558
  Design: Diameter=1.4 NumBlade=4 Beta34=20 UseBeta34Flag=1 Feather=3.22525 Rotate=0 Precone=0 ReverseFlag=0 FoldAngle=0 PropMode=0 AF=148.919 CLi=0.524046 Chord=0.177656 Solidity=0.226199 ConstructXoC=0.5 FeatherAxisXoC=0.5 FeatherOffsetXoC=0
  cross sections:
    n  RadiusFrac  shape
    0  0.2         ellipse Ellipse_Height=0.028 Ellipse_Width=0.056
    1  0.400001    NACA 16-series Chord=0.116375 IdealCl=0.7 ThickChord=0.200037
    2  1           NACA 16-series Chord=0.091 IdealCl=0.2 ThickChord=0.03
  blade curves as in "LiftRotor"

Hinge "HingeGeom_2", child of "PropNacells_2"
  location (X Y Z) 0.966436 -1.603 0.47377, rotation 0 0 0; relative location -0.07 0 0.1, rotation 0 0 0
  Hinge: JointRotMax=360 JointRotMaxFlag=0 JointRotMin=-360 JointRotMinFlag=0 JointRotate=0 JointRotateFlag=1 JointTransMax=1000 JointTransMaxFlag=0 JointTransMin=-1000 JointTransMinFlag=0 JointTranslate=0 JointTranslateFlag=0 OrientRotFlag=0 PrimOffAbsRelFlag=1 PrimType=0 PrimULoc=0 PrimVecAbsRelFlag=1 PrimWLoc=0 PrimXOff=0 PrimXOffRel=0 PrimXVec=0 PrimXVecRel=0 PrimYOff=0 PrimYOffRel=0 PrimYVec=1 PrimYVecRel=1 PrimZOff=0 PrimZOffRel=0 PrimZVec=0 PrimZVecRel=0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

Propeller "CruiseProp_2", child of "HingeGeom_2"
  location (X Y Z) 0.766436 -1.603 0.47377, rotation 0 0 0; relative location -0.2 0 0, rotation 0 0 0
  bounding box size 0.0516199 1.29358 1.3519
  negative volume
  Design: Diameter=1.4 NumBlade=5 Beta34=20 UseBeta34Flag=1 Feather=7.96875 Rotate=0 Precone=0 ReverseFlag=0 FoldAngle=0 PropMode=0 AF=103.884 CLi=0.538798 Chord=0.132407 Solidity=0.210733 ConstructXoC=0.5 FeatherAxisXoC=0.5 FeatherOffsetXoC=0
  cross sections:
    n  RadiusFrac  shape
    0  0.2         NACA 5-digit CamberLoc=0.15 Chord=0.056 IdealCl=0 ThickChord=0.14
    1  0.4         NACA 5-digit CamberLoc=0.15 Chord=0.0954074 IdealCl=0.7 ThickChord=0.11731
    2  1           NACA 5-digit CamberLoc=0.15 Chord=0.07 IdealCl=0.2 ThickChord=0.03
  blade curves as in "CruiseProp"

VSPAERO settings: Sref=3.45312 bref=4.5 cref=0.767361 Xcg=0 Ycg=0 Zcg=0 AlphaStart=0 AlphaEnd=10 AlphaNpts=1 BetaStart=0 BetaEnd=0 BetaNpts=1 MachStart=0 MachEnd=0 MachNpts=1 ReCref=1e+07 Vinf=60 Rho=1.125
